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/batch
! ANSYS input file written by Workbench version 19.2 RELEASE
! File used for geometry attach: C:\Users\hp\AppData\Local\Temp\WB_PRASAD_hp_1628_2\unsaved_project_files\dp0\global\MECH\SYS-1\AssembledModel\SYS-1.pmdb
/title,unsaved_project--Static Structural (B4)
/com,--- Data in consistent NMM units. See Solving Units in the help system for more information.
/units,MPA
/prep7
! Turn off shape checking because checks already performed inside WB mesher.
! See help system for more information.
SHPP,OFF,,NOWARN
etcon,set             ! allow ANSYS to choose best KEYOP's for 180x elements
/com,*********** Nodes for the whole assembly ***********
nblock,3,,827
(1i9,3e20.9e3)
       26     0.000000000E+00     9.500000000E+05     0.000000000E+00
        8     0.000000000E+00     1.000000000E+06     0.000000000E+00
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-1
/com,*********** Elements for Body 1 "Surface Body 1(External Model)" ***********
et,1,181
keyo,1,3,2
eblock,19,solid,,1388
(19i9)
        1        1        1        1        0        0        0        0        4        0        1       26        8       28       28
        1        1        1        1        0        0        0        0        4        0        2       58       90       59       59
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-1
/com,*********** Send User Defined Coordinate System(s) ***********
csys,0
toffst,273.15,  ! Temperature offset from absolute zero
/com,*********** Set Reference Temperature ***********
tref,22.
/com,*********** Send Materials ***********
Temperature = 'TEMP' ! Temperature
MP,DENS,1,7.85e-09,	! tonne mm^-3
MP,ALPX,1,1.2e-05,	! C^-1
MP,C,1,434000000,	! mm^2 s^-2 C^-1
MP,KXX,1,60.5,	! tonne mm s^-3 C^-1
MP,RSVX,1,0.00017,	! ohm mm
MP,EX,1,200000,	! tonne s^-2 mm^-1
MP,NUXY,1,0.3,
MP,MURX,1,10000,

/com,*********** Send Sheet Properties ***********
sectype,1,shell
secdata,0.1
secoff,mid

!************************* Model Summary ********************
!Surface Body 1(External Model),	Structural Steel,	matid,	1
!************************* End Model Summary ********************
fini
/com,****************************************************************************
/com,*************************    SOLUTION       ********************************
/com,****************************************************************************
/solu
antype,0                   ! static analysis
eqsl,sparse,,,,,1
cntr,print,1               ! print out contact info and also make no initial contact an error
dmpoption,emat,no             ! Don't combine emat file for DANSYS
dmpoption,esav,no             ! Don't combine esav file for DANSYS
nldiag,cont,iter           ! print out contact info each equilibrium iteration
rescontrol,,none                 ! Do not keep any restart files
/com,****************************************************
/com,******************* SOLVE FOR LS 1 OF 1 ****************
nsub,1,1,1
time,1.
outres,erase
outres,all,none
outres,nsol,all,
outres,rsol,all
outres,strs,all,
outres,epel,all,
outres,eppl,all,
stabilize,off                   ! Stabilization turned OFF by user
! *********** WB SOLVE COMMAND ***********
! check interactive state
*get,ANSINTER_,active,,int
*if,ANSINTER_,ne,0,then
/eof
*endif
solve
/com *************** Write FE CONNECTORS *********
CEWRITE,file,ce,,INTE
/com,****************************************************
/com,*************** FINISHED SOLVE FOR LS 1 *************
/post1
fini
